f_3dB := 3000
C := 10*10^-9
(1)
α := 0.958
k := 0.298
R := 1/(2*π*C*f_3dB/k) = 1580.94
R_B := (2 - α)*R = 1647.34
(2)
α := 0.289
k := 0.722
R := 1/(2*π*C*f_3dB/k) = 3830.33
R_B := (2 - α)*R = 6553.69
(3)
α := 0.078
k := 0.977
R := 1/(2*π*C*f_3dB/k) = 5183.15
R_B := (2 - α)*R = 9962.01
C := 2*10^-9 F
f_3dB := 3000 Hz
1*каскад
α := 0.958
k := 0.298
f_зр := f_3dB*k = 894 Hz
R := 1/(2*π*C*f_зр) = 89012.8 Ω
R_B := (2 - α)*R = 92751.4 Ω
K_1 := 1 + R_B/R = 2.042
2*каскад
α := 0.289
k := 0.722
f_зр := f_3dB*k = 2166 Hz
R := 1/(2*π*C*f_зр) = 36739.4 Ω
R_B := (2 - α)*R = 62861.1 Ω
K_2 := 1 + R_B/R = 2.711
3*каскад
α := 0.078
k := 0.977
f_зр := f_3dB*k = 2931 Hz
R := 1/(2*π*C*f_зр) = 27150.3 Ω
R_B := (2 - α)*R = 52182.8 Ω
K_3 := 1 + R_B/R = 2.922
K_Σ := K_1*K_2*K_3 = 16.1758
